<neuroml xmlns="http://www.neuroml.org/schema/neuroml2"  xmlns:xs="http://www.w3.org/2001/XMLSchema" xmlns:xsi="http://www.w3.org/2001/XMLSchema-instance" xsi:schemaLocation="http://www.neuroml.org/schema/neuroml2 https://raw.github.com/NeuroML/NeuroML2/development/Schemas/NeuroML2/NeuroML_v2beta5.xsd" id="NeuroML2_file_exported_from_NEURON">
    <include href="../channels/HCNp.channel.nml"></include>
    <include href="../channels/Kdrp.channel.nml"></include>
    <include href="../channels/KvAproxp.channel.nml"></include>
    <include href="../channels/KvAdistp.channel.nml"></include>
    <include href="../channels/Navp.channel.nml"></include>
    <include href="../channels/Navaxonp.channel.nml"></include>
    <include href="../channels/leak_chan.channel.nml"></include>
    <cell id="poolosyncell">
        <notes>Cell: poolosyncell exported from NEURON ModelView</notes>
        <morphology id="morphology">
            <segment id="0" name="Seg0_soma_0">
                <proximal x="0.000000e+00" y="0.000000e+00" z="0.000000e+00" diameter="3.4"/>
                <distal x="0.000000e+00" y="2.500000e-01" z="0.000000e+00" diameter="3.4"/>
            </segment>
            <segment id="2" name="Seg1_soma_0">
                <parent segment="0" fractionAlong="1"/>
                <distal x="0.000000e+00" y="5.000000e-01" z="0.000000e+00" diameter="3.4"/>
            </segment>
            <segment id="678" name="Seg0_basal_41">
                <parent segment="0" fractionAlong="0.0"/>
                <proximal x="0.000000e+00" y="0.000000e+00" z="0.000000e+00" diameter="1.0"/>
                <distal x="1.854950e+00" y="-4.387370e+00" z="0.000000e+00" diameter="1.0"/>
            </segment>
            <segment id="679" name="Seg1_basal_41">
                <parent segment="678" fractionAlong="1"/>
                <distal x="3.709900e+00" y="-8.774740e+00" z="0.000000e+00" diameter="1.0"/>
            </segment>
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            <segmentGroup neuroLexId="sao864921383" id="soma_0">
                <notes>This group contains an unbranched set of segments, and all of the segmentGroups marked with
             neuroLexId = sao864921383 form a non-overlapping set of all of the segments.
             These segmentGroups correspond to the 'cables' of NeuroML v1.8.1, and map to/from NEURON sections.</notes>
                <member segment="0"/>
                <member segment="2"/>
            </segmentGroup>
            <segmentGroup neuroLexId="sao864921383" id="basal_41">
                <notes>This group contains an unbranched set of segments, and all of the segmentGroups marked with
             neuroLexId = sao864921383 form a non-overlapping set of all of the segments.
             These segmentGroups correspond to the 'cables' of NeuroML v1.8.1, and map to/from NEURON sections.</notes>
                <member segment="678"/>
                <member segment="679"/>
            </segmentGroup>
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            <segmentGroup id="soma_group">
                <include segmentGroup="soma_0"/>
                <include segmentGroup="soma_1"/>
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            </segmentGroup>
            <segmentGroup id="somaMidpoint">
                <member segment="12"/>
            </segmentGroup>
            <segmentGroup id="dendrite_group">
                <include segmentGroup="basal_0"/>
                <include segmentGroup="basal_1"/>
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            </segmentGroup>
            <segmentGroup id="basal_group">
                <include segmentGroup="basal_0"/>
                <include segmentGroup="basal_1"/>
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            </segmentGroup>
            <segmentGroup id="apical_group">
                <include segmentGroup="apical_0"/>
                <include segmentGroup="apical_1"/>
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                <inhomogeneousParameter id="PathLengthOverDendrites" variable="p" metric="Path Length from root"/>
            </segmentGroup>
            <segmentGroup id="axon_group">
                <include segmentGroup="axon_0"/>
                <include segmentGroup="axon_1"/>
            </segmentGroup>
            <segmentGroup id="dendrite_list_0_to_50">
                <notes>segmentGroup added by A.Ecker to specify connection targets for opencortex (not added to segGroup id="all")</notes>
                <member segment="530"/>
                <member segment="531"/>
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            </segmentGroup>
            <segmentGroup id="dendrite_list_50_to_200">
                <notes>segmentGroup added by A.Ecker to specify connection targets for opencortex (not added to segGroup id="all")</notes>
                <member segment="543"/>
                <member segment="544"/>
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            </segmentGroup>
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        </morphology>
        <biophysicalProperties id="biophys">
            <membraneProperties>
                <channelDensity id="HCNsomap_soma" ionChannel="HCNsomap" condDensity="0.6mS_per_cm2" erev="-30mV" segmentGroup="soma_group" ion="non_specific"/>
                <channelDensity id="Kdrp_soma" ionChannel="Kdrp" condDensity="3mS_per_cm2" erev="-90mV" segmentGroup="soma_group" ion="k"/>
                <channelDensity id="Kdrp_basal" ionChannel="Kdrp" condDensity="3mS_per_cm2" erev="-90mV" segmentGroup="basal_group" ion="k"/>
                <channelDensity id="Kdrp_axon" ionChannel="Kdrp" condDensity="3mS_per_cm2" erev="-90mV" segmentGroup="axon_group" ion="k"/>
                <channelDensity id="KvAproxp_soma" ionChannel="KvAproxp" condDensity="8mS_per_cm2" erev="-90mV" segmentGroup="soma_group" ion="k"/>
                <channelDensity id="KvAproxp_basal" ionChannel="KvAproxp" condDensity="8mS_per_cm2" erev="-90mV" segmentGroup="basal_group" ion="k"/>
                <channelDensity id="KvAproxp_axon" ionChannel="KvAproxp" condDensity="1.6mS_per_cm2" erev="-90mV" segmentGroup="axon_group" ion="k"/>
                <channelDensity id="Nav_soma" ionChannel="Navp" condDensity="32mS_per_cm2" erev="55mV" segmentGroup="soma_group" ion="na"/>
                <channelDensity id="Navp_basal" ionChannel="Navp" condDensity="32mS_per_cm2" erev="55mV" segmentGroup="basal_group" ion="na"/>
                <channelDensity id="Navp_axon" ionChannel="Navaxonp" condDensity="64mS_per_cm2" erev="55mV" segmentGroup="axon_group" ion="na"/>
                <channelDensity id="leak_soma" ionChannel="leak_chan" condDensity="0.03571428571428572mS_per_cm2" erev="-66mV" segmentGroup="soma_group" ion="non_specific"/>
                <channelDensity id="leak_dendrite" ionChannel="leak_chan" condDensity="0.07142857142857144mS_per_cm2" erev="-66mV" segmentGroup="dendrite_group" ion="non_specific"/>
                <channelDensity id="leak_axon" ionChannel="leak_chan" condDensity="0.03571428571428572mS_per_cm2" erev="-66mV" segmentGroup="axon_group" ion="non_specific"/>
                <channelDensityNonUniform id="HCNsomap_apical" ionChannel="HCNsomap" erev="-30mV" ion="non_specific">
                    <variableParameter parameter="condDensity" segmentGroup="apical_group">
                        <inhomogeneousValue inhomogeneousParameter="PathLengthOverDendrites" value="H(100 - (p-4.57)) * 6 * (1 + 1.5*(p-4.57)/100)"/>
                    </variableParameter>
                </channelDensityNonUniform>
                <channelDensityNonUniform id="HCNp_apical" ionChannel="HCNp" erev="-30mV" ion="non_specific">
                    <variableParameter parameter="condDensity" segmentGroup="apical_group">
                        <inhomogeneousValue inhomogeneousParameter="PathLengthOverDendrites" value="H(500 - (p-4.57)) * H((p-4.57) - 100) * 6 * (1 + 1.5*(p-4.57)/100)"/>
                    </variableParameter>
                </channelDensityNonUniform>
                <channelDensityNonUniform id="Kdrp_apical" ionChannel="Kdrp" erev="-90mV" ion="k">
                    <variableParameter parameter="condDensity" segmentGroup="apical_group">
                        <inhomogeneousValue inhomogeneousParameter="PathLengthOverDendrites" value="H(500 - (p-4.57)) * 30"/>
                    </variableParameter>
                </channelDensityNonUniform>
                <channelDensityNonUniform id="KvAproxp_apical" ionChannel="KvAproxp" erev="-90mV" ion="k">
                    <variableParameter parameter="condDensity" segmentGroup="apical_group">
                        <inhomogeneousValue inhomogeneousParameter="PathLengthOverDendrites" value="H(100 - (p-4.57)) * 80 * (1 + (p-4.57)/100)"/>
                    </variableParameter>
                </channelDensityNonUniform>
                <channelDensityNonUniform id="KvAdistp_apical" ionChannel="KvAdistp" erev="-90mV" ion="k">
                    <variableParameter parameter="condDensity" segmentGroup="apical_group">
                        <inhomogeneousValue inhomogeneousParameter="PathLengthOverDendrites" value="H(500 - (p-4.57)) * H((p-4.57) - 100) * 80 * (1 + (p-4.57)/100)"/>
                    </variableParameter>
                </channelDensityNonUniform>
                <channelDensityNonUniform id="Navapicalp_apical" ionChannel="Navapicalp" erev="55mV" ion="na">
                    <variableParameter parameter="condDensity" segmentGroup="apical_group">
                        <inhomogeneousValue inhomogeneousParameter="PathLengthOverDendrites" value="H(500 - (p-4.57)) * 320"/>
                    </variableParameter>
                </channelDensityNonUniform>
                <spikeThresh value="0mV"/>
                <specificCapacitance value="1uF_per_cm2" segmentGroup="soma_group"/>
                <specificCapacitance value="2uF_per_cm2" segmentGroup="dendrite_group"/>
                <specificCapacitance value="1uF_per_cm2" segmentGroup="axon_group"/>
                <initMembPotential value="-66.0mV"/>
            </membraneProperties>
            <intracellularProperties>
                <resistivity value="0.15kohm_cm" segmentGroup="soma_group"/>
                <resistivity value="0.15kohm_cm" segmentGroup="dendrite_group"/>
                <resistivity value="0.05 kohm_cm" segmentGroup="axon_group"/>
            </intracellularProperties>
        </biophysicalProperties>
    </cell>
</neuroml>
