<?xml version="1.0" encoding="UTF-8"?>
<neuroml xmlns="http://www.neuroml.org/schema/neuroml2"
    xmlns:xsi="http://www.w3.org/2001/XMLSchema-instance"
    xsi:schemaLocation="http://www.neuroml.org/schema/neuroml2 https://raw.github.com/NeuroML/NeuroML2/development/Schemas/NeuroML2/NeuroML_v2beta4.xsd"
    id = "NeuroML2_file_exported_from_NEURON">

    <include href="../channels/HCNp.channel.nml"/>
    <include href="../channels/Kdrp.channel.nml"/>
    <include href="../channels/KvAproxp.channel.nml"/>
    <include href="../channels/KvAdistp.channel.nml"/>
    <include href="../channels/Navp.channel.nml"/>
    <include href="../channels/Navaxonp.channel.nml"/>
    <include href="../channels/leak_chan.channel.nml"/>

  <cell id="poolosyncell">
    <notes>Cell: poolosyncell exported from NEURON ModelView</notes>
    <morphology id="morphology">
<!-- Section: poolosyncell[0].soma[0] (segmentGroup: soma_0) which has 3 3D points, so 2 segment(s)-->
      <segment id="0" name = "Seg0_soma_0">
        <proximal x="0" y="0" z="0" diameter="3.4"/>
        <distal x="0.25" y="0" z="0" diameter="3.4"/>
      </segment>
      <segment id="2" name = "Seg1_soma_0">
        <parent segment="0"/>
        <distal x="0.5" y="0" z="0" diameter="3.4"/>
      </segment>
<!-- Section: poolosyncell[0].basal[41] (segmentGroup: basal_41) which has 3 3D points, so 2 segment(s)-->
      <segment id="678" name = "Seg0_basal_41">  <!-- Connected at 0 on parent section: poolosyncell[0].soma[0]  -->
        <parent segment="0" fractionAlong="0"/>
        <proximal x="0" y="0" z="0" diameter="1"/>
        <distal x="-4.38737" y="1.85495" z="0" diameter="1"/>
      </segment>
      <segment id="679" name = "Seg1_basal_41">
        <parent segment="678"/>
        <distal x="-8.77474" y="3.7099" z="0" diameter="1"/>
      </segment>
<!-- Section: poolosyncell[0].basal[23] (segmentGroup: basal_23) which has 3 3D points, so 2 segment(s)-->
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
<!-- Section: poolosyncell[0].soma[0] (segmentGroup: soma_0) which has 3 3D points, so 2 segment(s)-->

      <segmentGroup id = "soma_0"  neuroLexId="sao864921383">
         <notes>This group contains an unbranched set of segments, and all of the segmentGroups marked with
             neuroLexId = sao864921383 form a non-overlapping set of all of the segments.
             These segmentGroups correspond to the 'cables' of NeuroML v1.8.1, and map to/from NEURON sections.</notes>
        <member segment = "0"/>
        <member segment = "2"/>
      </segmentGroup>

<!-- Section: poolosyncell[0].basal[41] (segmentGroup: basal_41) which has 3 3D points, so 2 segment(s)-->

      <segmentGroup id = "basal_41"  neuroLexId="sao864921383">
         <notes>This group contains an unbranched set of segments, and all of the segmentGroups marked with
             neuroLexId = sao864921383 form a non-overlapping set of all of the segments.
             These segmentGroups correspond to the 'cables' of NeuroML v1.8.1, and map to/from NEURON sections.</notes>
        <member segment = "678"/>
        <member segment = "679"/>
      </segmentGroup>

<!-- Section: poolosyncell[0].basal[23] (segmentGroup: basal_23) which has 3 3D points, so 2 segment(s)-->

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
      <segmentGroup id="soma_group">
        <include segmentGroup = "soma_0"/>
        <include segmentGroup = "soma_1"/>
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      </segmentGroup>

      <segmentGroup id="dendrite_group">
        <include segmentGroup = "basal_0"/>
        <include segmentGroup = "basal_1"/>
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      </segmentGroup>

      <segmentGroup id="basal_group">
        <include segmentGroup = "basal_0"/>
        <include segmentGroup = "basal_1"/>
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      </segmentGroup>

      <segmentGroup id="apical_group"> <!-- just where diam > 0.5 -András-->
        <include segmentGroup = "apical_0"/>
        <include segmentGroup = "apical_1"/>
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
        <inhomogeneousParameter id="PathLengthOverDendrites" variable="p" metric="Path Length from root">
        </inhomogeneousParameter> <!-- it will be used as (p-4.57) because in the original code the distance is measured from soma[5] ... - András-->
      </segmentGroup>

      <segmentGroup id="axon_group">
        <include segmentGroup = "axon_0"/>
        <include segmentGroup = "axon_1"/>
      </segmentGroup>

    </morphology>

    <!-- Biophysical properties -->

    <biophysicalProperties id="biophys">

      <membraneProperties>
        <channelDensity ionChannel="HCNsomap" id="HCNsomap_soma" condDensity="0.6mS_per_cm2" segmentGroup="soma_group" erev="-30mV" ion="non_specific"/>
        <channelDensity ionChannel="Kdrp" id="Kdrp_soma" condDensity="3mS_per_cm2" segmentGroup="soma_group" erev="-90mV" ion="k"/>
        <channelDensity ionChannel="Kdrp" id="Kdrp_basal" condDensity="3mS_per_cm2" segmentGroup="basal_group" erev="-90mV" ion="k"/>
        <channelDensity ionChannel="Kdrp" id="Kdrp_axon" condDensity="3mS_per_cm2" segmentGroup="axon_group" erev="-90mV" ion="k"/>
        <channelDensity ionChannel="KvAproxp" id="KvAproxp_soma" condDensity="8mS_per_cm2" segmentGroup="soma_group" erev="-90mV" ion="k"/>
        <channelDensity ionChannel="KvAproxp" id="KvAproxp_basal" condDensity="8mS_per_cm2" segmentGroup="basal_group" erev="-90mV" ion="k"/>
        <channelDensity ionChannel="KvAproxp" id="KvAproxp_axon" condDensity="1.6mS_per_cm2" segmentGroup="axon_group" erev="-90mV" ion="k"/>
        <channelDensity ionChannel="Navp" id="Nav_soma" condDensity="32mS_per_cm2" segmentGroup="soma_group" erev="55mV" ion="na"/>
        <channelDensity ionChannel="Navp" id="Navp_basal" condDensity="32mS_per_cm2" segmentGroup="basal_group" erev="55mV" ion="na"/>
        <channelDensity ionChannel="Navaxonp" id="Navp_axon" condDensity="64mS_per_cm2" segmentGroup="axon_group" erev="55mV" ion="na"/>
        <channelDensity ionChannel="leak_chan" id="leak_soma" condDensity="0.03571428571428572mS_per_cm2" segmentGroup="soma_group" erev="-66mV" ion="non_specific"/>
        <channelDensity ionChannel="leak_chan" id="leak_dendrite" condDensity="0.07142857142857144mS_per_cm2" segmentGroup="dendrite_group" erev="-66mV" ion="non_specific"/>
        <channelDensity ionChannel="leak_chan" id="leak_axon" condDensity="0.03571428571428572mS_per_cm2" segmentGroup="axon_group" erev="-66mV" ion="non_specific"/>

        <!-- in the followings instead of p, (p-4.57) will be used (because in the original code the distance is measured from soma[5]) ... - András-->
        <!-- TODO: check weather the distance can be measured from elsewhere (not only from root:soma_0) in nml-->

        <!-- HCNsomap with param: gmax = f(p) = H(100 - p) * 0.6 * (1 + 1.5*p/100) mS/cm2 on ParameterisedGroup: PathLengthOverDendrites on: dendrite_group with metric: Path Length from root (NO_TRANSLATION, NO_NORMALISATION), var: p-->
        <channelDensityNonUniform ionChannel="HCNsomap" id="HCNsomap_apical" erev="-30mV" ion="non_specific">
            <variableParameter parameter="condDensity" segmentGroup="apical_group">
                <inhomogeneousValue inhomogeneousParameter="PathLengthOverDendrites" value="H(100 - (p-4.57)) * 6 * (1 + 1.5*(p-4.57)/100)"/>
            </variableParameter>
        </channelDensityNonUniform>
        <!-- HCNp with param: gmax = f(p) = H(500 - p) * H(p - 100) * 0.6 * (1 + 1.5*p/100) mS/cm2 on ParameterisedGroup: PathLengthOverDendrites on: dendrite_group with metric: Path Length from root (NO_TRANSLATION, NO_NORMALISATION), var: p-->
        <channelDensityNonUniform ionChannel="HCNp" id="HCNp_apical" erev="-30mV" ion="non_specific">
            <variableParameter parameter="condDensity" segmentGroup="apical_group">
                <inhomogeneousValue inhomogeneousParameter="PathLengthOverDendrites" value="H(500 - (p-4.57)) * H((p-4.57) - 100) * 6 * (1 + 1.5*(p-4.57)/100)"/>
            </variableParameter>
        </channelDensityNonUniform>
        <!-- Kdrp with param: gmax = f(p) = H(500 - p) * 3  mS/cm2 on ParameterisedGroup: PathLengthOverDendrites on: dendrite_group with metric: Path Length from root (NO_TRANSLATION, NO_NORMALISATION), var: p-->
        <channelDensityNonUniform ionChannel="Kdrp" id="Kdrp_apical" erev="-90mV" ion="k">
            <variableParameter parameter="condDensity" segmentGroup="apical_group">
                <inhomogeneousValue inhomogeneousParameter="PathLengthOverDendrites" value="H(500 - (p-4.57)) * 30"/>
            </variableParameter>
        </channelDensityNonUniform>
        <!-- KvAproxp with param: gmax = f(p) = H(100 - p) * 8 * (1 + p/100) mS/cm2 on ParameterisedGroup: PathLengthOverDendrites on: dendrite_group with metric: Path Length from root (NO_TRANSLATION, NO_NORMALISATION), var: p-->
        <channelDensityNonUniform ionChannel="KvAproxp" id="KvAproxp_apical" erev="-90mV" ion="k">
            <variableParameter parameter="condDensity" segmentGroup="apical_group">
                <inhomogeneousValue inhomogeneousParameter="PathLengthOverDendrites" value="H(100 - (p-4.57)) * 80 * (1 + (p-4.57)/100)"/>
            </variableParameter>
        </channelDensityNonUniform>
        <!-- KvAdistp with param: gmax = f(p) = H(500 - p) * H(p - 100) * 8 * (1 + p/100) mS/cm2 on ParameterisedGroup: PathLengthOverDendrites on: dendrite_group with metric: Path Length from root (NO_TRANSLATION, NO_NORMALISATION), var: p-->
        <channelDensityNonUniform ionChannel="KvAdistp" id="KvAdistp_apical" erev="-90mV" ion="k">
            <variableParameter parameter="condDensity" segmentGroup="apical_group">
                <inhomogeneousValue inhomogeneousParameter="PathLengthOverDendrites" value="H(500 - (p-4.57)) * H((p-4.57) - 100) * 80 * (1 + (p-4.57)/100)"/>
            </variableParameter>
        </channelDensityNonUniform>
        <!-- Navapicalp with param: gmax = f(p) = H(500 - p) * 32 mS/cm2 on ParameterisedGroup: PathLengthOverDendrites on: dendrite_group with metric: Path Length from root (NO_TRANSLATION, NO_NORMALISATION), var: p-->
        <channelDensityNonUniform ionChannel="Navapicalp" id="Navapicalp_apical" erev="55mV" ion="na">
            <variableParameter parameter="condDensity" segmentGroup="apical_group">
                <inhomogeneousValue inhomogeneousParameter="PathLengthOverDendrites" value="H(500 - (p-4.57)) * 320"/>
            </variableParameter>
        </channelDensityNonUniform>

        <spikeThresh value="0mV"/>

        <specificCapacitance value="1uF_per_cm2" segmentGroup="soma_group"/>
        <specificCapacitance value="2uF_per_cm2" segmentGroup="dendrite_group"/>
        <specificCapacitance value="1uF_per_cm2" segmentGroup="axon_group"/>

        <initMembPotential value="-65.0mV"/>

      </membraneProperties>

      <intracellularProperties>

        <resistivity value="0.15kohm_cm" segmentGroup="soma_group"/>
        <resistivity value="0.15kohm_cm" segmentGroup="dendrite_group"/>
        <resistivity value="0.05 kohm_cm" segmentGroup="axon_group"/>

      </intracellularProperties>

    </biophysicalProperties>

  </cell>

</neuroml>
