<?xml version='1.0' encoding='UTF-8'?>
<Lems>

  <!-- cutsuridis cell -->

    <Target component="sim1"/>

    <Include file="Cells.xml"/>
    <Include file="Networks.xml"/>
    <Include file="Simulation.xml"/>

    <Include file="cutsuridis.net.nml"/>

<!-- Simulation specifications -->

    <Simulation id="sim1" length="300ms" step="0.001ms" target="network">

        <Display id="d1" title="cutsuridis cell with 0.5nA input" timeScale="1ms" xmin="-10" xmax="310" ymin="-85" ymax="55">
            <Line id="cutsuridis V(mV)" quantity="Pop_cutsuridiscell/0/cutsuridiscell/v" scale="1mV" color="#0000FF" timeScale="1ms"/>
        </Display>

        <OutputFile id="of0" fileName="cutsuridis.dat">
            <OutputColumn id="v" quantity="Pop_cutsuridiscell/0/cutsuridiscell/v"/>
        </OutputFile>

    </Simulation>

</Lems>
