<?xml version='1.0' encoding='UTF-8'?>
<Lems>

  <!-- sca cell -->

    <Target component="sim1"/>

    <Include file="Cells.xml"/>
    <Include file="Networks.xml"/>
    <Include file="Simulation.xml"/>

    <Include file="sca.net.nml"/>

<!-- Simulation specifications -->

    <Simulation id="sim1" length="300ms" step="0.001ms" target="network">

        <Display id="d1" title="sca cell with 0.06nA input" timeScale="1ms" xmin="-10" xmax="310" ymin="-85" ymax="55">
            <Line id="sca V(mV)" quantity="Pop_scacell/0/scacell/v" scale="1mV" color="#0000FF" timeScale="1ms"/>
        </Display>

        <OutputFile id="of0" fileName="sca.dat">
            <OutputColumn id="v" quantity="Pop_scacell/0/scacell/v"/>
            <OutputColumn id="cai" quantity="Pop_scacell/0/scacell/caConc"/>
        </OutputFile>

    </Simulation>

</Lems>
