<neuroml xmlns="http://www.neuroml.org/schema/neuroml2"  xmlns:xs="http://www.w3.org/2001/XMLSchema" xmlns:xsi="http://www.w3.org/2001/XMLSchema-instance" xsi:schemaLocation="http://www.neuroml.org/schema/neuroml2 https://raw.github.com/NeuroML/NeuroML2/development/Schemas/NeuroML2/NeuroML_v2beta5.xsd" id="HippocampalNet">

    <include href="../cells/axoaxonic.cell.nml"></include>
    <include href="../cells/bistratified.cell.nml"></include>
    <include href="../cells/cck.cell.nml"></include>
    <include href="../cells/ivy.cell.nml"></include>
    <include href="../cells/ngf.cell.nml"></include>
    <include href="../cells/olm.cell.nml"></include>
    <include href="../cells/poolosyn.cell.nml"></include>
    <include href="../cells/pvbasket.cell.nml"></include>
    <include href="../cells/sca.cell.nml"></include>

    <network id="HippocampalNet" type="networkWithTemperature" temperature="34.0 degC">

        <notes>Network to visualize cells alongside</notes>

        <population id="pop_poolosyn" component="poolosyncell" size="1" type="populationList">
            <instance id="0">
                <location x="0." y="125." z="0."/>  <!-- y-z changed only for OSB -->
            </instance>
        </population>

        <population id="pop_pvbasket" component="pvbasketcell" size="1" type="populationList">
            <instance id="0">
                <location x="200." y="125." z="0."/>  <!-- y-z changed only for OSB -->
            </instance>
        </population>

        <population id="pop_cck" component="cckcell" size="1" type="populationList">
            <instance id="0">
                <location x="400." y="125." z="0."/>  <!-- y-z changed only for OSB -->
            </instance>
        </population>

        <population id="pop_sca" component="scacell" size="1" type="populationList">
            <instance id="0">
                <location x="600." y="250." z="0."/>  <!-- y-z changed only for OSB -->
            </instance>
        </population>

        <population id="pop_axoaxonic" component="axoaxoniccell" size="1" type="populationList">
            <instance id="0">
                <location x="800." y="125." z="0."/>  <!-- y-z changed only for OSB -->
            </instance>
        </population>

        <population id="pop_bistratified" component="bistratifiedcell" size="1" type="populationList">
            <instance id="0">
                <location x="1000." y="125." z="0."/>  <!-- y-z changed only for OSB -->
            </instance>
        </population>

        <population id="pop_olm" component="olmcell" size="1" type="populationList">
            <instance id="0">
                <location x="1200." y="50." z="0."/>  <!-- y-z changed only for OSB -->
            </instance>
        </population>

        <population id="pop_ivy" component="ivycell" size="1" type="populationList">
            <instance id="0">
                <location x="1400." y="125." z="0."/>  <!-- y-z changed only for OSB -->
            </instance>
        </population>

        <population id="pop_ngf" component="ngfcell" size="1" type="populationList">
            <instance id="0">
                <location x="1600." y="400." z="0."/>  <!-- y-z changed only for OSB -->
            </instance>
        </population>

    </network>
</neuroml>
