<neuroml xmlns="http://www.neuroml.org/schema/neuroml2"  xmlns:xs="http://www.w3.org/2001/XMLSchema" xmlns:xsi="http://www.w3.org/2001/XMLSchema-instance" xsi:schemaLocation="http://www.neuroml.org/schema/neuroml2 https://raw.github.com/NeuroML/NeuroML2/development/Schemas/NeuroML2/NeuroML_v2beta5.xsd" id="HippocampalNet_scale1000_oc_nosyns">
    <notes>

This NeuroML 2 file was generated by OpenCortex v0.1.4 using:
    libNeuroML v0.2.33
    pyNeuroML v0.3.1

    </notes>
    <property tag="Network seed" value="12345"/>
    <include href="../cells/axoaxonic.cell.nml"></include>
    <include href="../cells/bistratified.cell.nml"></include>
    <include href="../cells/cck.cell.nml"></include>
    <include href="../cells/ivy.cell.nml"></include>
    <include href="../cells/ngf.cell.nml"></include>
    <include href="../cells/olm.cell.nml"></include>
    <include href="../cells/poolosyn.cell.nml"></include>
    <include href="../cells/pvbasket.cell.nml"></include>
    <include href="../cells/sca.cell.nml"></include>
    <SpikeSourcePoisson id="stim_ec" start="0ms" duration="500.000000ms" rate="0.65Hz"/>
    <SpikeSourcePoisson id="stim_ca3" start="0ms" duration="500.000000ms" rate="0.65Hz"/>
    <network id="HippocampalNet_scale1000_oc_nosyns" type="networkWithTemperature" temperature="34degC">
        <population id="pop_ngf" component="ngfcell" size="3" type="populationList">
            <instance id="0">
                <location x="1666.479490180000084" y="351.016916945999981" z="825.206509254000025"/>
            </instance>
            <instance id="1">
                <location x="1194.559420799999998" y="386.841168949000007" z="193.661349045000009"/>
            </instance>
            <instance id="2">
                <location x="2264.032674919999863" y="366.168782393000015" z="124.266884284"/>
            </instance>
        </population>
        <population id="pop_bistratified" component="bistratifiedcell" size="2" type="populationList">
            <instance id="0">
                <location x="1731.745072039999968" y="128.103924403999997" z="174.343560724000014"/>
            </instance>
            <instance id="1">
                <location x="2212.884342280000055" y="117.745069317000002" z="958.064785099999995"/>
            </instance>
        </population>
        <population id="pop_sca" component="scacell" size="1" type="populationList">
            <instance id="0">
                <location x="365.176395506999995" y="345.727999113999999" z="412.119392939000022"/>
            </instance>
        </population>
        <population id="pop_olm" component="olmcell" size="1" type="populationList">
            <instance id="0">
                <location x="2015.741472440000052" y="14.814616893" z="718.967140300999972"/>
            </instance>
        </population>
        <population id="pop_ec" component="stim_ec" size="250" type="populationList">
            <instance id="0">
                <location x="3918.997137870000188" y="534.156042576999994" z="452.352121813999986"/>
            </instance>
            <instance id="1">
                <location x="3933.951777239999956" y="596.748245888000042" z="547.879845419000048"/>
            </instance>
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        </population>
        <population id="pop_poolosyn" component="poolosyncell" size="311" type="populationList">
            <instance id="0">
                <location x="3434.653899240000101" y="127.883023831000003" z="932.132803170999978"/>
            </instance>
            <instance id="1">
                <location x="3585.58281283999986" y="108.173735557000001" z="56.958392126"/>
            </instance>
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        </population>
        <population id="pop_pvbasket" component="pvbasketcell" size="5" type="populationList">
            <instance id="0">
                <location x="3106.518777119999868" y="112.417494697999999" z="747.139416192999988"/>
            </instance>
            <instance id="1">
                <location x="653.726896713999963" y="131.707042077000011" z="674.372917073000053"/>
            </instance>
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        </population>
        <population id="pop_ca3" component="stim_ca3" size="204" type="populationList">
            <instance id="0">
                <location x="78.190007190000003" y="507.959262363999983" z="527.773799464000035"/>
            </instance>
            <instance id="1">
                <location x="90.496275383500006" y="561.978625187000034" z="542.522030283000049"/>
            </instance>
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        </population>
        <population id="pop_cck" component="cckcell" size="3" type="populationList">
            <instance id="0">
                <location x="3113.293141619999915" y="110.533549156000007" z="279.359350962000008"/>
            </instance>
            <instance id="1">
                <location x="2787.285902650000025" y="119.156901328000004" z="394.223786431000008"/>
            </instance>
            <instance id="2">
                <location x="3660.033729969999968" y="143.383304121999998" z="991.928281559999959"/>
            </instance>
        </population>
        <population id="pop_axoaxonic" component="axoaxoniccell" size="1" type="populationList">
            <instance id="0">
                <location x="2234.684278870000071" y="118.898193903999996" z="589.835469023999963"/>
            </instance>
        </population>
        <population id="pop_ivy" component="ivycell" size="8" type="populationList">
            <instance id="0">
                <location x="1635.549689510000007" y="148.295833603000005" z="263.604024122999988"/>
            </instance>
            <instance id="1">
                <location x="3306.141348940000171" y="139.351358167000001" z="278.968324655999993"/>
            </instance>
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        </population>
    </network>
</neuroml>
