<Lems>

    <!--

        This LEMS file has been automatically generated using PyNeuroML v0.3.1 (libNeuroML v0.2.33)

     -->

    <!-- Specify which component to run -->
    <Target component="Sim_HippocampalNet_oc"/>

    <!-- Include core NeuroML2 ComponentType definitions -->
    <Include file="Cells.xml"/>
    <Include file="Networks.xml"/>
    <Include file="Simulation.xml"/>

    <Include file="PyNN.xml"/>
    <Include file="HippocampalNet_oc.net.nml"/>

    <Simulation id="Sim_HippocampalNet_oc" length="100ms" step="0.01ms" target="HippocampalNet_oc" seed="12345">  <!-- Note seed: ensures same random numbers used every run -->

        <Display id="DispPop__pop_ngf" title="Membrane potentials of cells in pop_ngf" timeScale="1ms" xmin="-10.0" xmax="110.0" ymin="-90" ymax="50">
            <Line id="pop_ngf[0]: v" quantity="pop_ngf/0/ngfcell/v" scale="1mV" color="#6aa799" timeScale="1ms"/>
        </Display>

        <Display id="DispPop__pop_bistratified" title="Membrane potentials of cells in pop_bistratified" timeScale="1ms" xmin="-10.0" xmax="110.0" ymin="-90" ymax="50">
            <Line id="pop_bistratified[0]: v" quantity="pop_bistratified/0/bistratifiedcell/v" scale="1mV" color="#029a72" timeScale="1ms"/>
        </Display>

        <Display id="DispPop__pop_sca" title="Membrane potentials of cells in pop_sca" timeScale="1ms" xmin="-10.0" xmax="110.0" ymin="-90" ymax="50">
            <Line id="pop_sca[0]: v" quantity="pop_sca/0/scacell/v" scale="1mV" color="#d340bb" timeScale="1ms"/>
        </Display>

        <Display id="DispPop__pop_olm" title="Membrane potentials of cells in pop_olm" timeScale="1ms" xmin="-10.0" xmax="110.0" ymin="-90" ymax="50">
            <Line id="pop_olm[0]: v" quantity="pop_olm/0/olmcell/v" scale="1mV" color="#4c73a9" timeScale="1ms"/>
        </Display>

        <Display id="DispPop__pop_ec" title="Membrane potentials of cells in pop_ec" timeScale="1ms" xmin="-10.0" xmax="110.0" ymin="-90" ymax="50">
            <Line id="pop_ec[0]: v" quantity="pop_ec/0/stim_ec/tsince" scale="1mV" color="#5e503a" timeScale="1ms"/>
            <Line id="pop_ec[1]: v" quantity="pop_ec/1/stim_ec/tsince" scale="1mV" color="#3193ca" timeScale="1ms"/>
        </Display>

        <Display id="DispPop__pop_poolosyn" title="Membrane potentials of cells in pop_poolosyn" timeScale="1ms" xmin="-10.0" xmax="110.0" ymin="-90" ymax="50">
            <Line id="pop_poolosyn[0]: v" quantity="pop_poolosyn/0/poolosyncell/v" scale="1mV" color="#90e5e9" timeScale="1ms"/>
            <Line id="pop_poolosyn[1]: v" quantity="pop_poolosyn/1/poolosyncell/v" scale="1mV" color="#29645f" timeScale="1ms"/>
            <Line id="pop_poolosyn[2]: v" quantity="pop_poolosyn/2/poolosyncell/v" scale="1mV" color="#1fcff4" timeScale="1ms"/>
        </Display>

        <Display id="DispPop__pop_pvbasket" title="Membrane potentials of cells in pop_pvbasket" timeScale="1ms" xmin="-10.0" xmax="110.0" ymin="-90" ymax="50">
            <Line id="pop_pvbasket[0]: v" quantity="pop_pvbasket/0/pvbasketcell/v" scale="1mV" color="#6ed4e9" timeScale="1ms"/>
        </Display>

        <Display id="DispPop__pop_ca3" title="Membrane potentials of cells in pop_ca3" timeScale="1ms" xmin="-10.0" xmax="110.0" ymin="-90" ymax="50">
            <Line id="pop_ca3[0]: v" quantity="pop_ca3/0/stim_ca3/tsince" scale="1mV" color="#8fe460" timeScale="1ms"/>
            <Line id="pop_ca3[1]: v" quantity="pop_ca3/1/stim_ca3/tsince" scale="1mV" color="#2ca1c7" timeScale="1ms"/>
        </Display>

        <Display id="DispPop__pop_cck" title="Membrane potentials of cells in pop_cck" timeScale="1ms" xmin="-10.0" xmax="110.0" ymin="-90" ymax="50">
            <Line id="pop_cck[0]: v" quantity="pop_cck/0/cckcell/v" scale="1mV" color="#8d9fe5" timeScale="1ms"/>
        </Display>

        <Display id="DispPop__pop_axoaxonic" title="Membrane potentials of cells in pop_axoaxonic" timeScale="1ms" xmin="-10.0" xmax="110.0" ymin="-90" ymax="50">
            <Line id="pop_axoaxonic[0]: v" quantity="pop_axoaxonic/0/axoaxoniccell/v" scale="1mV" color="#5adad1" timeScale="1ms"/>
        </Display>

        <Display id="DispPop__pop_ivy" title="Membrane potentials of cells in pop_ivy" timeScale="1ms" xmin="-10.0" xmax="110.0" ymin="-90" ymax="50">
            <Line id="pop_ivy[0]: v" quantity="pop_ivy/0/ivycell/v" scale="1mV" color="#f543bb" timeScale="1ms"/>
        </Display>

        <OutputFile id="Volts_file__pop_ngf" fileName="Sim_HippocampalNet_oc.pop_ngf.v.dat">
            <OutputColumn id="v_pop_ngf_0_ngfcell_v" quantity="pop_ngf/0/ngfcell/v"/>
        </OutputFile>

        <OutputFile id="Volts_file__pop_bistratified" fileName="Sim_HippocampalNet_oc.pop_bistratified.v.dat">
            <OutputColumn id="v_pop_bistratified_0_bistratifiedcell_v" quantity="pop_bistratified/0/bistratifiedcell/v"/>
        </OutputFile>

        <OutputFile id="Volts_file__pop_sca" fileName="Sim_HippocampalNet_oc.pop_sca.v.dat">
            <OutputColumn id="v_pop_sca_0_scacell_v" quantity="pop_sca/0/scacell/v"/>
        </OutputFile>

        <OutputFile id="Volts_file__pop_olm" fileName="Sim_HippocampalNet_oc.pop_olm.v.dat">
            <OutputColumn id="v_pop_olm_0_olmcell_v" quantity="pop_olm/0/olmcell/v"/>
        </OutputFile>

        <OutputFile id="Volts_file__pop_ec" fileName="Sim_HippocampalNet_oc.pop_ec.tsince.dat">
            <OutputColumn id="v_pop_ec_0_stim_ec_tsince" quantity="pop_ec/0/stim_ec/tsince"/>
            <OutputColumn id="v_pop_ec_1_stim_ec_tsince" quantity="pop_ec/1/stim_ec/tsince"/>
        </OutputFile>

        <OutputFile id="Volts_file__pop_poolosyn" fileName="Sim_HippocampalNet_oc.pop_poolosyn.v.dat">
            <OutputColumn id="v_pop_poolosyn_0_poolosyncell_v" quantity="pop_poolosyn/0/poolosyncell/v"/>
            <OutputColumn id="v_pop_poolosyn_1_poolosyncell_v" quantity="pop_poolosyn/1/poolosyncell/v"/>
            <OutputColumn id="v_pop_poolosyn_2_poolosyncell_v" quantity="pop_poolosyn/2/poolosyncell/v"/>
        </OutputFile>

        <OutputFile id="Volts_file__pop_pvbasket" fileName="Sim_HippocampalNet_oc.pop_pvbasket.v.dat">
            <OutputColumn id="v_pop_pvbasket_0_pvbasketcell_v" quantity="pop_pvbasket/0/pvbasketcell/v"/>
        </OutputFile>

        <OutputFile id="Volts_file__pop_ca3" fileName="Sim_HippocampalNet_oc.pop_ca3.tsince.dat">
            <OutputColumn id="v_pop_ca3_0_stim_ca3_tsince" quantity="pop_ca3/0/stim_ca3/tsince"/>
            <OutputColumn id="v_pop_ca3_1_stim_ca3_tsince" quantity="pop_ca3/1/stim_ca3/tsince"/>
        </OutputFile>

        <OutputFile id="Volts_file__pop_cck" fileName="Sim_HippocampalNet_oc.pop_cck.v.dat">
            <OutputColumn id="v_pop_cck_0_cckcell_v" quantity="pop_cck/0/cckcell/v"/>
        </OutputFile>

        <OutputFile id="Volts_file__pop_axoaxonic" fileName="Sim_HippocampalNet_oc.pop_axoaxonic.v.dat">
            <OutputColumn id="v_pop_axoaxonic_0_axoaxoniccell_v" quantity="pop_axoaxonic/0/axoaxoniccell/v"/>
        </OutputFile>

        <OutputFile id="Volts_file__pop_ivy" fileName="Sim_HippocampalNet_oc.pop_ivy.v.dat">
            <OutputColumn id="v_pop_ivy_0_ivycell_v" quantity="pop_ivy/0/ivycell/v"/>
        </OutputFile>

        <EventOutputFile id="Spikes_file__pop_ngf" fileName="Sim_HippocampalNet_oc.pop_ngf.spikes" format="ID_TIME">
            <EventSelection id="0" select="pop_ngf/0/ngfcell" eventPort="spike"/>
        </EventOutputFile>

        <EventOutputFile id="Spikes_file__pop_bistratified" fileName="Sim_HippocampalNet_oc.pop_bistratified.spikes" format="ID_TIME">
            <EventSelection id="0" select="pop_bistratified/0/bistratifiedcell" eventPort="spike"/>
        </EventOutputFile>

        <EventOutputFile id="Spikes_file__pop_sca" fileName="Sim_HippocampalNet_oc.pop_sca.spikes" format="ID_TIME">
            <EventSelection id="0" select="pop_sca/0/scacell" eventPort="spike"/>
        </EventOutputFile>

        <EventOutputFile id="Spikes_file__pop_olm" fileName="Sim_HippocampalNet_oc.pop_olm.spikes" format="ID_TIME">
            <EventSelection id="0" select="pop_olm/0/olmcell" eventPort="spike"/>
        </EventOutputFile>

        <EventOutputFile id="Spikes_file__pop_ec" fileName="Sim_HippocampalNet_oc.pop_ec.spikes" format="ID_TIME">
            <EventSelection id="0" select="pop_ec/0/stim_ec" eventPort="spike"/>
            <EventSelection id="1" select="pop_ec/1/stim_ec" eventPort="spike"/>
        </EventOutputFile>

        <EventOutputFile id="Spikes_file__pop_poolosyn" fileName="Sim_HippocampalNet_oc.pop_poolosyn.spikes" format="ID_TIME">
            <EventSelection id="0" select="pop_poolosyn/0/poolosyncell" eventPort="spike"/>
            <EventSelection id="1" select="pop_poolosyn/1/poolosyncell" eventPort="spike"/>
            <EventSelection id="2" select="pop_poolosyn/2/poolosyncell" eventPort="spike"/>
        </EventOutputFile>

        <EventOutputFile id="Spikes_file__pop_pvbasket" fileName="Sim_HippocampalNet_oc.pop_pvbasket.spikes" format="ID_TIME">
            <EventSelection id="0" select="pop_pvbasket/0/pvbasketcell" eventPort="spike"/>
        </EventOutputFile>

        <EventOutputFile id="Spikes_file__pop_ca3" fileName="Sim_HippocampalNet_oc.pop_ca3.spikes" format="ID_TIME">
            <EventSelection id="0" select="pop_ca3/0/stim_ca3" eventPort="spike"/>
            <EventSelection id="1" select="pop_ca3/1/stim_ca3" eventPort="spike"/>
        </EventOutputFile>

        <EventOutputFile id="Spikes_file__pop_cck" fileName="Sim_HippocampalNet_oc.pop_cck.spikes" format="ID_TIME">
            <EventSelection id="0" select="pop_cck/0/cckcell" eventPort="spike"/>
        </EventOutputFile>

        <EventOutputFile id="Spikes_file__pop_axoaxonic" fileName="Sim_HippocampalNet_oc.pop_axoaxonic.spikes" format="ID_TIME">
            <EventSelection id="0" select="pop_axoaxonic/0/axoaxoniccell" eventPort="spike"/>
        </EventOutputFile>

        <EventOutputFile id="Spikes_file__pop_ivy" fileName="Sim_HippocampalNet_oc.pop_ivy.spikes" format="ID_TIME">
            <EventSelection id="0" select="pop_ivy/0/ivycell" eventPort="spike"/>
        </EventOutputFile>

    </Simulation>

</Lems>
