<Lems>

    <!--

        This LEMS file has been automatically generated using PyNeuroML v0.3.12 (libNeuroML v0.2.44)

     -->

    <!-- Specify which component to run -->
    <Target component="Sim_PINGNet_0_1"/>

    <!-- Include core NeuroML2 ComponentType definitions -->
    <Include file="Cells.xml"/>
    <Include file="Networks.xml"/>
    <Include file="Simulation.xml"/>

    <Include file="PyNN.xml"/>
    <Include file="PINGNet_0_1.net.nml"/>
    <Include file="../cells/poolosyn.cell.nml"/>
    <Include file="../channels/HCNp.channel.nml"/>
    <Include file="../channels/Kdrp.channel.nml"/>
    <Include file="../channels/KvAproxp.channel.nml"/>
    <Include file="../channels/KvAdistp.channel.nml"/>
    <Include file="../channels/Navp.channel.nml"/>
    <Include file="../channels/Navaxonp.channel.nml"/>
    <Include file="../channels/leak_chan.channel.nml"/>
    <Include file="../cells/pvbasket.cell.nml"/>
    <Include file="../channels/CavL.channel.nml"/>
    <Include file="../channels/CavN.channel.nml"/>
    <Include file="../channels/KCaS.channel.nml"/>
    <Include file="../channels/Kdrfast.channel.nml"/>
    <Include file="../channels/KvA.channel.nml"/>
    <Include file="../channels/KvCaB.channel.nml"/>
    <Include file="../channels/Capool.nml"/>
    <Include file="../synapses/exp2Synapses.synapse.nml"/>

    <Simulation id="Sim_PINGNet_0_1" length="60ms" step="0.01ms" target="PINGNet_0_1" seed="1111">  <!-- Note seed: ensures same random numbers used every run -->

        <Display id="Display_pop_pvbasket_v" title="Plots of Display_pop_pvbasket_v" timeScale="1ms" xmin="-6.0" xmax="66.0" ymin="-80" ymax="40">
            <Line id="pop_pvbasket_0_pvbasketcell_v" quantity="pop_pvbasket/0/pvbasketcell/v" scale="1mV" color="#6aa799" timeScale="1ms"/>
            <Line id="pop_pvbasket_1_pvbasketcell_v" quantity="pop_pvbasket/1/pvbasketcell/v" scale="1mV" color="#029a72" timeScale="1ms"/>
            <Line id="pop_pvbasket_2_pvbasketcell_v" quantity="pop_pvbasket/2/pvbasketcell/v" scale="1mV" color="#d340bb" timeScale="1ms"/>
        </Display>

        <Display id="Display_pop_poolosyn_v" title="Plots of Display_pop_poolosyn_v" timeScale="1ms" xmin="-6.0" xmax="66.0" ymin="-80" ymax="40">
            <Line id="pop_poolosyn_0_poolosyncell_v" quantity="pop_poolosyn/0/poolosyncell/v" scale="1mV" color="#4c73a9" timeScale="1ms"/>
            <Line id="pop_poolosyn_1_poolosyncell_v" quantity="pop_poolosyn/1/poolosyncell/v" scale="1mV" color="#5e503a" timeScale="1ms"/>
            <Line id="pop_poolosyn_2_poolosyncell_v" quantity="pop_poolosyn/2/poolosyncell/v" scale="1mV" color="#3193ca" timeScale="1ms"/>
            <Line id="pop_poolosyn_3_poolosyncell_v" quantity="pop_poolosyn/3/poolosyncell/v" scale="1mV" color="#90e5e9" timeScale="1ms"/>
            <Line id="pop_poolosyn_4_poolosyncell_v" quantity="pop_poolosyn/4/poolosyncell/v" scale="1mV" color="#29645f" timeScale="1ms"/>
        </Display>

        <OutputFile id="Sim_PINGNet_0_1_pop_pvbasket_v_dat" fileName="Sim_PINGNet_0_1.pop_pvbasket.v.dat">
            <OutputColumn id="pop_pvbasket_0_pvbasketcell_v" quantity="pop_pvbasket/0/pvbasketcell/v"/>
            <OutputColumn id="pop_pvbasket_1_pvbasketcell_v" quantity="pop_pvbasket/1/pvbasketcell/v"/>
            <OutputColumn id="pop_pvbasket_2_pvbasketcell_v" quantity="pop_pvbasket/2/pvbasketcell/v"/>
        </OutputFile>

        <OutputFile id="Sim_PINGNet_0_1_pop_poolosyn_v_dat" fileName="Sim_PINGNet_0_1.pop_poolosyn.v.dat">
            <OutputColumn id="pop_poolosyn_0_poolosyncell_v" quantity="pop_poolosyn/0/poolosyncell/v"/>
            <OutputColumn id="pop_poolosyn_1_poolosyncell_v" quantity="pop_poolosyn/1/poolosyncell/v"/>
            <OutputColumn id="pop_poolosyn_2_poolosyncell_v" quantity="pop_poolosyn/2/poolosyncell/v"/>
            <OutputColumn id="pop_poolosyn_3_poolosyncell_v" quantity="pop_poolosyn/3/poolosyncell/v"/>
            <OutputColumn id="pop_poolosyn_4_poolosyncell_v" quantity="pop_poolosyn/4/poolosyncell/v"/>
        </OutputFile>

        <EventOutputFile id="Spikes_file__pop_poolosyn" fileName="Sim_PINGNet_0_1.pop_poolosyn.spikes" format="ID_TIME">
            <EventSelection id="0" select="pop_poolosyn/0/poolosyncell" eventPort="spike"/>
            <EventSelection id="1" select="pop_poolosyn/1/poolosyncell" eventPort="spike"/>
            <EventSelection id="2" select="pop_poolosyn/2/poolosyncell" eventPort="spike"/>
            <EventSelection id="3" select="pop_poolosyn/3/poolosyncell" eventPort="spike"/>
            <EventSelection id="4" select="pop_poolosyn/4/poolosyncell" eventPort="spike"/>
        </EventOutputFile>

        <EventOutputFile id="Spikes_file__pop_pvbasket" fileName="Sim_PINGNet_0_1.pop_pvbasket.spikes" format="ID_TIME">
            <EventSelection id="0" select="pop_pvbasket/0/pvbasketcell" eventPort="spike"/>
            <EventSelection id="1" select="pop_pvbasket/1/pvbasketcell" eventPort="spike"/>
            <EventSelection id="2" select="pop_pvbasket/2/pvbasketcell" eventPort="spike"/>
        </EventOutputFile>

    </Simulation>

</Lems>
