<Lems>

    <!--

        This LEMS file has been automatically generated using PyNeuroML v0.1.10 (libNeuroML v0.2.13)

     -->

    <!-- Specify which component to run -->
    <Target component="Sim_MiniScale_HippocampalNet"/>

    <!-- Include core NeuroML2 ComponentType definitions -->
    <Include file="Cells.xml"/>
    <Include file="Networks.xml"/>
    <Include file="Simulation.xml"/>

    <Include file="../channels/CavL.channel.nml"/>
    <Include file="../channels/CavN.channel.nml"/>
    <Include file="../channels/HCN.channel.nml"/>
    <Include file="../channels/HCNolm.channel.nml"/>
    <Include file="../channels/HCNp.channel.nml"/>
    <Include file="../channels/KCaS.channel.nml"/>
    <Include file="../channels/Kdrfast.channel.nml"/>
    <Include file="../channels/Kdrfastngf.channel.nml"/>
    <Include file="../channels/Kdrp.channel.nml"/>
    <Include file="../channels/Kdrslow.channel.nml"/>
    <Include file="../channels/KvA.channel.nml"/>
    <Include file="../channels/KvAdistp.channel.nml"/>
    <Include file="../channels/KvAngf.channel.nml"/>
    <Include file="../channels/KvAolm.channel.nml"/>
    <Include file="../channels/KvAproxp.channel.nml"/>
    <Include file="../channels/KvCaB.channel.nml"/>
    <Include file="../channels/KvGroup.channel.nml"/>
    <Include file="../channels/Nav.channel.nml"/>
    <Include file="../channels/Navaxonp.channel.nml"/>
    <Include file="../channels/Navbis.channel.nml"/>
    <Include file="../channels/Navcck.channel.nml"/>
    <Include file="../channels/Navngf.channel.nml"/>
    <Include file="../channels/Navp.channel.nml"/>
    <Include file="../channels/leak_chan.channel.nml"/>
    <Include file="../channels/Capool.nml"/>
    <Include file="../cells/axoaxonic.cell.nml"/>
    <Include file="../cells/bistratified.cell.nml"/>
    <Include file="../cells/cck.cell.nml"/>
    <Include file="../cells/cutsuridis.cell.nml"/>
    <Include file="../cells/ivy.cell.nml"/>
    <Include file="../cells/ngf.cell.nml"/>
    <Include file="../cells/olm.cell.nml"/>
    <Include file="../cells/poolosyn.cell.nml"/>
    <Include file="../cells/pvbasket.cell.nml"/>
    <Include file="../cells/sca.cell.nml"/>
    <Include file="../synapses/exp2Synapses.synapse.nml"/>
    <Include file="../synapses/customGABASynapses.synapse.nml"/>
    <Include file="stimulations.nml"/>
    <Include file="MiniScale_HippocampalNet.net.nml"/>

    <Simulation id="Sim_MiniScale_HippocampalNet" length="2000ms" step="0.01ms" target="MiniScale_HippocampalNet" seed="12345">  <!-- Note seed: ensures same random numbers used every run -->

        <Display id="disp_PC" title="Voltages Pyramidal cells" timeScale="1ms" xmin="-10.0" xmax="110.0" ymin="-80" ymax="50">
            <Line id="PC 0: V[mV]" quantity="pop_poolosyn/0/poolosyncell/v" scale="1mV" color="#f5ec9f" timeScale="1ms"/>
            <Line id="PC 1: V[mV]" quantity="pop_poolosyn/1/poolosyncell/v" scale="1mV" color="#4a8c49" timeScale="1ms"/>
            <Line id="PC 2: V[mV]" quantity="pop_poolosyn/2/poolosyncell/v" scale="1mV" color="#080118" timeScale="1ms"/>
        </Display>

        <OutputFile id="of_ngf" fileName="ngf.v.dat">
            <OutputColumn id="v_0" quantity="pop_ngf/0/ngfcell/v"/>
        </OutputFile>

        <OutputFile id="of_bistratified" fileName="bistratified.v.dat">
            <OutputColumn id="v_0" quantity="pop_bistratified/0/bistratifiedcell/v"/>
        </OutputFile>

        <OutputFile id="of_sca" fileName="sca.v.dat">
            <OutputColumn id="v_0" quantity="pop_sca/0/scacell/v"/>
        </OutputFile>

        <OutputFile id="of_olm" fileName="olm.v.dat">
            <OutputColumn id="v_0" quantity="pop_olm/0/olmcell/v"/>
        </OutputFile>

        <OutputFile id="of_ivy" fileName="ivy.v.dat">
            <OutputColumn id="v_0" quantity="pop_ivy/0/ivycell/v"/>
        </OutputFile>

        <OutputFile id="of_pvbasket" fileName="pvbasket.v.dat">
            <OutputColumn id="v_0" quantity="pop_pvbasket/0/pvbasketcell/v"/>
        </OutputFile>

        <OutputFile id="of_cck" fileName="cck.v.dat">
            <OutputColumn id="v_0" quantity="pop_cck/0/cckcell/v"/>
        </OutputFile>

        <OutputFile id="of_axoaxonic" fileName="axoaxonic.v.dat">
            <OutputColumn id="v_0" quantity="pop_axoaxonic/0/axoaxoniccell/v"/>
        </OutputFile>

        <OutputFile id="of_poolosyn" fileName="poolosyn.v.dat">
            <OutputColumn id="v_0" quantity="pop_poolosyn/0/poolosyncell/v"/>
            <OutputColumn id="v_1" quantity="pop_poolosyn/1/poolosyncell/v"/>
            <OutputColumn id="v_2" quantity="pop_poolosyn/2/poolosyncell/v"/>
        </OutputFile>

        <EventOutputFile id="spikes_PC" fileName="PC.spikes.dat" format="ID_TIME">
            <EventSelection id="0" select="pop_poolosyn/0/poolosyncell" eventPort="spike"/>
            <EventSelection id="1" select="pop_poolosyn/1/poolosyncell" eventPort="spike"/>
            <EventSelection id="2" select="pop_poolosyn/2/poolosyncell" eventPort="spike"/>
        </EventOutputFile>

    </Simulation>

</Lems>
