<neuroml xmlns="http://www.neuroml.org/schema/neuroml2"  xmlns:xs="http://www.w3.org/2001/XMLSchema" xmlns:xsi="http://www.w3.org/2001/XMLSchema-instance" xsi:schemaLocation="http://www.neuroml.org/schema/neuroml2 https://raw.github.com/NeuroML/NeuroML2/development/Schemas/NeuroML2/NeuroML_v2.0.xsd" id="PINGNet">
    <notes>

This NeuroML 2 file was generated by OpenCortex v0.1.11 using:
    libNeuroML v0.2.50
    pyNeuroML v0.5.1

    </notes>
    <property tag="Network seed" value="12345"/>
    <include href="../cells/poolosyn.cell.nml"/>
    <include href="../cells/pvbasket.cell.nml"/>
    <include href="../synapses/exp2Synapses.synapse.nml"/>
    <SpikeSourcePoisson id="stim_ca3" start="0ms" duration="100.000000ms" rate="10.000000Hz"/>
    <SpikeSourcePoisson id="stim_ec" start="0ms" duration="100.000000ms" rate="10.000000Hz"/>
    <network id="PINGNet" type="networkWithTemperature" temperature="34degC">
        <population id="pop_poolosyn" component="poolosyncell" size="50" type="populationList">
            <instance id="0">
                <location x="833.239749999999958" y="5.08458" z="825.20650999999998"/>
            </instance>
            <instance id="1">
                <location x="597.279710000000023" y="184.205839999999995" z="193.661349999999999"/>
            </instance>
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        </population>
        <population id="pop_pvbasket" component="pvbasketcell" size="20" type="populationList">
            <instance id="0">
                <location x="1867.761790000000019" y="15.302490000000001" z="602.45641999999998"/>
            </instance>
            <instance id="1">
                <location x="375.90152999999998" y="198.472139999999996" z="181.83538999999999"/>
            </instance>
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        </population>
        <population id="pop_ca3" component="stim_ca3" size="40" type="populationList">
            <property tag="radius" value="5"/>
            <instance id="0">
                <location x="5.67188" y="560.982549999999947" z="545.216429999999946"/>
            </instance>
            <instance id="1">
                <location x="9.640739999999999" y="567.411410000000046" z="544.007510000000025"/>
            </instance>
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        </population>
        <population id="pop_ec" component="stim_ec" size="40" type="populationList">
            <property tag="radius" value="5"/>
            <instance id="0">
                <location x="1975.110429999999951" y="565.552249999999958" z="451.432270000000017"/>
            </instance>
            <instance id="1">
                <location x="1916.012490000000071" y="617.893029999999953" z="541.332020000000057"/>
            </instance>
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        </population>
        <projection id="proj_pop_poolosyn_pop_pvbasket" presynapticPopulation="pop_poolosyn" postsynapticPopulation="pop_pvbasket" synapse="syn_poolosyn_to_pvbasket">
            <connectionWD id="0" preCellId="../pop_poolosyn/40/poolosyncell" preSegmentId="12" preFractionAlong="0.635862500169" postCellId="../pop_pvbasket/0/pvbasketcell" postSegmentId="7" postFractionAlong="0.0112243252619" weight="20." delay="3 ms"/>
            <connectionWD id="1" preCellId="../pop_poolosyn/9/poolosyncell" preSegmentId="12" preFractionAlong="0.0250642822165" postCellId="../pop_pvbasket/0/pvbasketcell" postSegmentId="27" postFractionAlong="0.978091506569" weight="20." delay="3 ms"/>
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        </projection>
        <projection id="proj_pop_pvbasket_pop_poolosyn" presynapticPopulation="pop_pvbasket" postsynapticPopulation="pop_poolosyn" synapse="syn_pvbasket_to_poolosyn">
            <connectionWD id="0" preCellId="../pop_pvbasket/0/pvbasketcell" preFractionAlong="0.27167565945" postCellId="../pop_poolosyn/0/poolosyncell" postSegmentId="16" postFractionAlong="0.249115517114" weight="20." delay="3 ms"/>
            <connectionWD id="1" preCellId="../pop_pvbasket/4/pvbasketcell" preFractionAlong="0.413503932136" postCellId="../pop_poolosyn/0/poolosyncell" postSegmentId="25" postFractionAlong="0.606919119129" weight="20." delay="3 ms"/>
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        </projection>
        <projection id="proj_pop_pvbasket_pop_pvbasket" presynapticPopulation="pop_pvbasket" postsynapticPopulation="pop_pvbasket" synapse="syn_pvbasket_to_pvbasket">
            <connectionWD id="0" preCellId="../pop_pvbasket/5/pvbasketcell" preFractionAlong="0.0768755508335" postCellId="../pop_pvbasket/0/pvbasketcell" postSegmentId="2" postFractionAlong="0.666726464473" weight="50." delay="3 ms"/>
            <connectionWD id="1" preCellId="../pop_pvbasket/14/pvbasketcell" preFractionAlong="0.984984654376" postCellId="../pop_pvbasket/0/pvbasketcell" postSegmentId="2" postFractionAlong="0.555201231476" weight="50." delay="3 ms"/>
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        </projection>
        <projection id="proj_pop_ca3_pop_poolosyn" presynapticPopulation="pop_ca3" postsynapticPopulation="pop_poolosyn" synapse="syn_ca3_to_poolosyn">
            <connectionWD id="0" preCellId="../pop_ca3/26/stim_ca3" postCellId="../pop_poolosyn/0/poolosyncell" postSegmentId="581" postFractionAlong="0.945482775688" weight="50." delay="3 ms"/>
            <connectionWD id="1" preCellId="../pop_ca3/29/stim_ca3" postCellId="../pop_poolosyn/0/poolosyncell" postSegmentId="633" postFractionAlong="0.182410469045" weight="50." delay="3 ms"/>
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        </projection>
        <projection id="proj_pop_ec_pop_poolosyn" presynapticPopulation="pop_ec" postsynapticPopulation="pop_poolosyn" synapse="syn_ec_to_poolosyn">
            <connectionWD id="0" preCellId="../pop_ec/2/stim_ec" postCellId="../pop_poolosyn/0/poolosyncell" postSegmentId="397" postFractionAlong="0.109413505417" weight="15." delay="3 ms"/>
            <connectionWD id="1" preCellId="../pop_ec/13/stim_ec" postCellId="../pop_poolosyn/0/poolosyncell" postSegmentId="280" postFractionAlong="0.0759735695552" weight="15." delay="3 ms"/>
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        </projection>
        <projection id="proj_pop_ca3_pop_pvbasket" presynapticPopulation="pop_ca3" postsynapticPopulation="pop_pvbasket" synapse="syn_ca3_to_pvbasket">
            <connectionWD id="0" preCellId="../pop_ca3/28/stim_ca3" postCellId="../pop_pvbasket/0/pvbasketcell" postSegmentId="31" postFractionAlong="0.14393597784" weight="15." delay="3 ms"/>
            <connectionWD id="1" preCellId="../pop_ca3/23/stim_ca3" postCellId="../pop_pvbasket/0/pvbasketcell" postSegmentId="30" postFractionAlong="0.517685121845" weight="15." delay="3 ms"/>
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        </projection>
    </network>
</neuroml>
