<neuroml xmlns="http://www.neuroml.org/schema/neuroml2"  xmlns:xs="http://www.w3.org/2001/XMLSchema" xmlns:xsi="http://www.w3.org/2001/XMLSchema-instance" xsi:schemaLocation="http://www.neuroml.org/schema/neuroml2 https://raw.github.com/NeuroML/NeuroML2/development/Schemas/NeuroML2/NeuroML_v2.1.xsd" id="PINGNet_0_1">
    <notes>

This NeuroML 2 file was generated by OpenCortex v0.1.11 using:
    libNeuroML v0.2.53
    pyNeuroML v0.5.6

    </notes>
    <property tag="Network seed" value="12345"/>
    <include href="../cells/poolosyn.cell.nml"/>
    <include href="../cells/pvbasket.cell.nml"/>
    <include href="../synapses/exp2Synapses.synapse.nml"/>
    <SpikeSourcePoisson id="stim_ca3" start="0ms" duration="60.000000ms" rate="10.000000Hz"/>
    <SpikeSourcePoisson id="stim_ec" start="0ms" duration="60.000000ms" rate="10.000000Hz"/>
    <network id="PINGNet_0_1" type="networkWithTemperature" temperature="34degC">
        <population id="pop_poolosyn" component="poolosyncell" size="5" type="populationList">
            <instance id="0">
                <location x="833.239749999999958" y="5.08458" z="825.20650999999998"/>
            </instance>
            <instance id="1">
                <location x="597.279710000000023" y="184.205839999999995" z="193.661349999999999"/>
            </instance>
            <instance id="2">
                <location x="1132.0163399999999" y="80.843909999999994" z="124.26688"/>
            </instance>
            <instance id="3">
                <location x="865.872539999999958" y="281.039240000000007" z="174.343559999999997"/>
            </instance>
            <instance id="4">
                <location x="1106.442170000000033" y="177.450690000000009" z="958.064790000000016"/>
            </instance>
        </population>
        <population id="pop_pvbasket" component="pvbasketcell" size="3" type="populationList">
            <instance id="0">
                <location x="182.588200000000001" y="489.319999999999993" z="412.11939000000001"/>
            </instance>
            <instance id="1">
                <location x="1007.870739999999955" y="74.073080000000004" z="718.967139999999972"/>
            </instance>
            <instance id="2">
                <location x="379.942760000000021" y="170.780210000000011" z="23.52122"/>
            </instance>
        </population>
        <population id="pop_ca3" component="stim_ca3" size="4" type="populationList">
            <property tag="radius" value="5"/>
            <instance id="0">
                <location x="33.951779999999999" y="646.748249999999985" z="547.879850000000033"/>
            </instance>
            <instance id="1">
                <location x="74.453000000000003" y="550.345460000000003" z="544.023850000000039"/>
            </instance>
            <instance id="2">
                <location x="87.076700000000002" y="627.083430000000021" z="467.887380000000007"/>
            </instance>
            <instance id="3">
                <location x="9.949960000000001" y="591.453250000000025" z="538.553649999999948"/>
            </instance>
        </population>
        <population id="pop_ec" component="stim_ec" size="4" type="populationList">
            <property tag="radius" value="5"/>
            <instance id="0">
                <location x="1957.808600000000069" y="623.658220000000028" z="473.262110000000007"/>
            </instance>
            <instance id="1">
                <location x="1952.359760000000051" y="620.938639999999964" z="532.483389999999986"/>
            </instance>
            <instance id="2">
                <location x="1980.71244999999999" y="573.230810000000019" z="537.31899999999996"/>
            </instance>
            <instance id="3">
                <location x="1921.638040000000046" y="630.189920000000029" z="505.508530000000007"/>
            </instance>
        </population>
        <projection id="proj_pop_poolosyn_pop_pvbasket" presynapticPopulation="pop_poolosyn" postsynapticPopulation="pop_pvbasket" synapse="syn_poolosyn_to_pvbasket">
            <connectionWD id="0" preCellId="../pop_poolosyn/1/poolosyncell" preSegmentId="12" preFractionAlong="0.41671820865524994" postCellId="../pop_pvbasket/0/pvbasketcell" postSegmentId="28" postFractionAlong="0.9040780353323055" weight="20." delay="3 ms"/>
            <connectionWD id="1" preCellId="../pop_poolosyn/2/poolosyncell" preSegmentId="12" preFractionAlong="0.2432677814285058" postCellId="../pop_pvbasket/0/pvbasketcell" postSegmentId="14" postFractionAlong="0.9072767539215936" weight="20." delay="3 ms"/>
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        </projection>
        <projection id="proj_pop_pvbasket_pop_poolosyn" presynapticPopulation="pop_pvbasket" postsynapticPopulation="pop_poolosyn" synapse="syn_pvbasket_to_poolosyn">
            <connectionWD id="0" preCellId="../pop_pvbasket/0/pvbasketcell" preFractionAlong="0.779521192437195" postCellId="../pop_poolosyn/0/poolosyncell" postSegmentId="13" postFractionAlong="0.7721211655996018" weight="20." delay="3 ms"/>
            <connectionWD id="1" preCellId="../pop_pvbasket/2/pvbasketcell" preSegmentId="2" preFractionAlong="0.2847767341311478" postCellId="../pop_poolosyn/0/poolosyncell" postSegmentId="26" postFractionAlong="0.8170131655311819" weight="20." delay="3 ms"/>
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        </projection>
        <projection id="proj_pop_pvbasket_pop_pvbasket" presynapticPopulation="pop_pvbasket" postsynapticPopulation="pop_pvbasket" synapse="syn_pvbasket_to_pvbasket">
            <connectionWD id="0" preCellId="../pop_pvbasket/2/pvbasketcell" preSegmentId="2" preFractionAlong="0.0904855254070629" postCellId="../pop_pvbasket/0/pvbasketcell" postSegmentId="2" postFractionAlong="0.7984654621624283" weight="50." delay="3 ms"/>
            <connectionWD id="1" preCellId="../pop_pvbasket/1/pvbasketcell" preSegmentId="2" preFractionAlong="0.3115899280301718" postCellId="../pop_pvbasket/0/pvbasketcell" postFractionAlong="0.37654603611565385" weight="50." delay="3 ms"/>
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        </projection>
        <projection id="proj_pop_ca3_pop_poolosyn" presynapticPopulation="pop_ca3" postsynapticPopulation="pop_poolosyn" synapse="syn_ca3_to_poolosyn">
            <connectionWD id="0" preCellId="../pop_ca3/0/stim_ca3" postCellId="../pop_poolosyn/0/poolosyncell" postSegmentId="676" postFractionAlong="0.18145125043552277" weight="50." delay="3 ms"/>
            <connectionWD id="1" preCellId="../pop_ca3/1/stim_ca3" postCellId="../pop_poolosyn/0/poolosyncell" postSegmentId="736" postFractionAlong="0.07912317465520494" weight="50." delay="3 ms"/>
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        </projection>
        <projection id="proj_pop_ec_pop_poolosyn" presynapticPopulation="pop_ec" postsynapticPopulation="pop_poolosyn" synapse="syn_ec_to_poolosyn">
            <connectionWD id="0" preCellId="../pop_ec/0/stim_ec" postCellId="../pop_poolosyn/0/poolosyncell" postSegmentId="348" postFractionAlong="0.7249280874241558" weight="15." delay="3 ms"/>
            <connectionWD id="1" preCellId="../pop_ec/0/stim_ec" postCellId="../pop_poolosyn/0/poolosyncell" postSegmentId="355" postFractionAlong="0.18855782945924124" weight="15." delay="3 ms"/>
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        </projection>
        <projection id="proj_pop_ca3_pop_pvbasket" presynapticPopulation="pop_ca3" postsynapticPopulation="pop_pvbasket" synapse="syn_ca3_to_pvbasket">
            <connectionWD id="0" preCellId="../pop_ca3/0/stim_ca3" postCellId="../pop_pvbasket/0/pvbasketcell" postSegmentId="26" postFractionAlong="0.9796113288420559" weight="15." delay="3 ms"/>
            <connectionWD id="1" preCellId="../pop_ca3/0/stim_ca3" postCellId="../pop_pvbasket/0/pvbasketcell" postSegmentId="14" postFractionAlong="0.3010019691797798" weight="15." delay="3 ms"/>
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        </projection>
    </network>
</neuroml>
