<neuroml xmlns="http://www.neuroml.org/schema/neuroml2"  xmlns:xs="http://www.w3.org/2001/XMLSchema" xmlns:xsi="http://www.w3.org/2001/XMLSchema-instance" xsi:schemaLocation="http://www.neuroml.org/schema/neuroml2 https://raw.github.com/NeuroML/NeuroML2/development/Schemas/NeuroML2/NeuroML_v2beta5.xsd" id="Stim_ec_poolosyn_400_30Hz">
    <notes>

This NeuroML 2 file was generated by OpenCortex v0.1.0 using:
    libNeuroML v0.2.30
    pyNeuroML v0.2.12

    </notes>
    <property tag="Network seed" value="1234"/>
    <include href="../../cells/poolosyn.cell.nml"></include>
    <include href="../../synapses/exp2Synapses.synapse.nml"></include>
    <poissonFiringSynapse id="ps_syn_ec_to_poolosyn" averageRate="30 Hz" synapse="syn_ec_to_poolosyn" spikeTarget="./syn_ec_to_poolosyn"/>
    <network id="Stim_ec_poolosyn_400_30Hz" type="networkWithTemperature" temperature="34degC">
        <population id="pop_poolosyn" component="poolosyncell" size="1" type="populationList">
            <instance id="0">
                <location x="0." y="0." z="0."/>
            </instance>
        </population>
        <inputList id="Stim_0" population="pop_poolosyn" component="ps_syn_ec_to_poolosyn">
            <input id="0" target="../pop_poolosyn/0/poolosyncell" destination="synapses" segmentId="145" fractionAlong="0.251762142189"/>
            <input id="1" target="../pop_poolosyn/0/poolosyncell" destination="synapses" segmentId="461" fractionAlong="0.555218349893"/>
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        </inputList>
    </network>
</neuroml>
